*Heading
** Job name: Bague Model name: Bague_de_serrage
** Generated by: Abaqus/CAE 6.9-2
*Preprint, echo=NO, model=NO, history=NO, contact=NO
**
** PARTS
**
*Part, name=Bague
*Node
      1,         24.5,          7.5
      2,          20.,          7.5
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*Element, type=CAX4
1, 13, 14, 22, 23
2,  7,  2,  8, 22
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*Nset, nset=_PickedSet2, internal, generate
  1,  27,   1
*Elset, elset=_PickedSet2, internal, generate
  1,  16,   1
** Section: Section-duralumin
*Solid Section, elset=_PickedSet2, material=Duralumin
,
*End Part
**
*Part, name=Tube_ext
*Node
      1,   20.2999992,          -5.
      2,   17.0499992,          -5.
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*Element, type=CAX4
 1,  5, 63, 26,  2
 2, 15, 14, 46, 55
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*Nset, nset=_PickedSet2, internal, generate
  1,  63,   1
*Elset, elset=_PickedSet2, internal, generate
  1,  40,   1
** Section: Section-acier
*Solid Section, elset=_PickedSet2, material=Acier
,
*End Part
**
*Part, name=Tube_int
*Node
      1,          17.,          20.
      2,          13.,          20.
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*Element, type=CAX4
 1,  5, 45, 44,  1
 2, 62,  7,  8, 46
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*Nset, nset=_PickedSet2, internal, generate
  1,  63,   1
*Elset, elset=_PickedSet2, internal, generate
  1,  40,   1
** Section: Section-acier
*Solid Section, elset=_PickedSet2, material=Acier
,
*End Part
**
**
** ASSEMBLY
**
*Assembly, name=Assembly
**
*Instance, name=Bague-1, part=Bague
          0.,          40.,           0.
*End Instance
**
*Instance, name=Tube_1-1, part=Tube_int
*End Instance
**
*Instance, name=Tube_2-1, part=Tube_ext
*End Instance
**
*Nset, nset=_PickedSet14, internal, instance=Tube_1-1
  3,  4, 25
*Elset, elset=_PickedSet14, internal, instance=Tube_1-1
 22, 23
*Nset, nset=_PickedSet16, internal, instance=Bague-1
 1, 2, 7
*Elset, elset=_PickedSet16, internal, instance=Bague-1
  2,  7, 10, 15
*Nset, nset=_PickedSet17, internal, instance=Tube_2-1
  3,  4, 25
*Elset, elset=_PickedSet17, internal, instance=Tube_2-1
  4, 22
*Elset, elset=__PickedSurf8_S1, internal, instance=Tube_2-1
  2,  6,  7,  8,  9, 10, 11, 12, 13, 14, 15, 16, 17, 18, 19
*Elset, elset=__PickedSurf8_S3, internal, instance=Tube_2-1
  4, 20, 21, 39, 40
*Surface, type=ELEMENT, name=_PickedSurf8, internal
__PickedSurf8_S1, S1
__PickedSurf8_S3, S3
*Elset, elset=__PickedSurf9_S2, internal, instance=Bague-1
 2, 8
*Elset, elset=__PickedSurf9_S4, internal, instance=Bague-1
 3,
*Elset, elset=__PickedSurf9_S3, internal, instance=Bague-1
  5, 12, 15
*Elset, elset=__PickedSurf9_S1, internal, instance=Bague-1
  9, 14
*Surface, type=ELEMENT, name=_PickedSurf9, internal
__PickedSurf9_S2, S2
__PickedSurf9_S4, S4
__PickedSurf9_S3, S3
__PickedSurf9_S1, S1
*Elset, elset=__PickedSurf10_S3, internal, instance=Tube_2-1
 1,
*Elset, elset=__PickedSurf10_S4, internal, instance=Tube_2-1
 3,
*Elset, elset=__PickedSurf10_S2, internal, instance=Tube_2-1
  5, 22, 23, 24, 25, 26
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*Surface, type=ELEMENT, name=_PickedSurf10, internal
__PickedSurf10_S3, S3
__PickedSurf10_S4, S4
__PickedSurf10_S2, S2
*Elset, elset=__PickedSurf11_S3, internal, instance=Tube_1-1
  1, 13, 15, 17, 19, 24, 25, 26, 27, 29, 30, 32, 33, 35
*Elset, elset=__PickedSurf11_S1, internal, instance=Tube_1-1
  4,  6,  8, 10, 23, 40
*Surface, type=ELEMENT, name=_PickedSurf11, internal
__PickedSurf11_S3, S3
__PickedSurf11_S1, S1
*Elset, elset=__PickedSurf15_S2, internal, instance=Bague-1
 2, 8
*Elset, elset=__PickedSurf15_S4, internal, instance=Bague-1
 3,
*Elset, elset=__PickedSurf15_S3, internal, instance=Bague-1
  5, 12, 15
*Elset, elset=__PickedSurf15_S1, internal, instance=Bague-1
  9, 14
*Surface, type=ELEMENT, name=_PickedSurf15, internal
__PickedSurf15_S2, S2
__PickedSurf15_S4, S4
__PickedSurf15_S3, S3
__PickedSurf15_S1, S1
*End Assembly
**
** MATERIALS
**
*Material, name=Acier
*Elastic
210000., 0.3
*Material, name=Duralumin
*Elastic
75000., 0.3
**
** INTERACTION PROPERTIES
**
*Surface Interaction, name=Propriete_de_base
1.,
*Friction
0.,
*Surface Behavior, pressure-overclosure=HARD
**
** BOUNDARY CONDITIONS
**
** Name: Blocage_Y_tube2 Type: Displacement/Rotation
*Boundary
_PickedSet14, 2, 2
** Name: Blocage_en_Y Type: Displacement/Rotation
*Boundary
_PickedSet16, 2, 2
** Name: blocage_Y_tube1 Type: Displacement/Rotation
*Boundary
_PickedSet17, 2, 2
**
** INTERACTIONS
**
** Interaction: Interaction_tubes
*Contact Pair, interaction=Propriete_de_base, type=SURFACE TO SURFACE
_PickedSurf11, _PickedSurf10
** Interaction: interaction_bague_tube1
*Contact Pair, interaction=Propriete_de_base
_PickedSurf9, _PickedSurf8
** ----------------------------------------------------------------
**
** STEP: Ouverture
**
*Step, name=Ouverture, inc=20
ouverture de la bague
*Static
0.25, 1., 1e-05, 0.25
**
** LOADS
**
** Name: Pression_ouverture   Type: Pressure
*Dsload
_PickedSurf15, P, 220.
**
** OUTPUT REQUESTS
**
*Restart, write, frequency=0
**
** FIELD OUTPUT: F-Output-1
**
*Output, field, variable=PRESELECT
**
** HISTORY OUTPUT: H-Output-1
**
*Output, history, variable=PRESELECT
*End Step
** ----------------------------------------------------------------
**
** STEP: D
**
*Step, name=D
*Static
1., 1., 1e-05, 1.
**
** BOUNDARY CONDITIONS
**
** Name: Blocage_en_Y Type: Displacement/Rotation
*Boundary
_PickedSet16, 2, 2, -40.
**
** OUTPUT REQUESTS
**
*Restart, write, frequency=0
**
** FIELD OUTPUT: F-Output-1
**
*Output, field, variable=PRESELECT
**
** HISTORY OUTPUT: H-Output-1
**
*Output, history, variable=PRESELECT
*End Step
** ----------------------------------------------------------------
**
** STEP: Fermeture
**
*Step, name=Fermeture
*Static
0.1, 1., 1e-05, 0.1
**
** LOADS
**
** Name: Pression_ouverture   Type: Pressure
*Dsload, op=NEW
**
** OUTPUT REQUESTS
**
*Restart, write, frequency=0
**
** FIELD OUTPUT: F-Output-1
**
*Output, field, variable=PRESELECT
**
** HISTORY OUTPUT: H-Output-1
**
*Output, history, variable=PRESELECT
*End Step
